units		metal
dimension	3
boundary	p p p
atom_style	full
newton on

#Read in Bottom Atoms
read_data	twist0-84.txt


# ------Force Fields --------
# Interaction potential for carbon atoms
######################## Potential defition ########################
pair_style       hybrid/overlay  rebo kolmogorov/crespi/full 16.0 1
pair_coeff       * *   rebo	CH.rebo        C C # chemical
pair_coeff       * *   kolmogorov/crespi/full   CH_taper.KC   C C # long-range
####################################################################

neighbor		2.0 bin
neigh_modify	delay 0 one 10000

delete_atoms overlap 0.4 all all

compute csym all centro/atom 12
compute mytemp all temp
compute 2 all stress/atom mytemp
compute 21 all reduce sum c_2[1]
compute 22 all reduce sum c_2[2]
compute 23 all reduce sum c_2[3]
compute 24 all reduce sum c_2[4]
compute 25 all reduce sum c_2[5]
compute 26 all reduce sum c_2[6]

compute 3 all pe/atom
compute 4 all reduce sum c_3
compute 6 all pair rebo
compute 8 all pair kolmogorov/crespi/full

timestep	0.0005

thermo         100
thermo_style   custom step pe ke etotal temp c_mytemp c_6 c_8

fix            cal_nve all nve


dump           mydump1 all cfg 100 min_kink1_*.cfg mass type xs ys zs
dump_modify    mydump1 element C C

dump           mydump2 all custom 50 min_kink1.* id type x y z c_csym c_2[1] c_2[2] c_2[3] c_2[4] c_2[5] c_2[6] c_3

minimize       1e-11 1e-12 10000 10000000

unfix cal_nve
undump mydump1
undump mydump2
